// SBML level 2 version 4

model Model_1()
  // New Model

  // Compartments:
  compartment cell = 1;

  // Species:
  species A in cell = 0;
  species gA in cell = 1;
  species B in cell = 0;
  species gB in cell = 1;
  species A2 in cell = 0;
  species B2 in cell = 0;
  species A2gB in cell = 0;
  species B2gA in cell = 0;

  // Parameters:
  geA = 0.1;
  repA = 1;
  rep_r = 0.01;
  dim = 1;
  dim_r = 0.01;
  deg = 0.5;
  deg_dim = 0;
  geB = 0;
  repB = 0;

  // Reactions:
  R1: gA => gA + A; cell*geA*gA;
  R2: gB => gB + B; cell*geB*gB;
  R3: 2 A => A2; cell*dim*A^2;
  R4: 2 B => B2; cell*dim*B^2;
  R5: B2 => 2 B; cell*dim_r*B2;
  R6: A2 => 2 A; cell*dim_r*A2;
  R7: gA + B2 => B2gA; cell*repA*gA*B2;
  R8: B2gA => gA + B2; cell*rep_r*B2gA;
  R9: gB + A2 => A2gB; cell*repB*gB*A2;
  R10: A2gB => gB + A2; cell*rep_r*A2gB;
  R11: A => ; cell*deg*A;
  R12: B => ; cell*deg*B;
  R19: A2 => ; cell*deg_dim*A2;
  R20: B2 => ; cell*deg_dim*B2;

  // Unit definitions:
  unit volume = 1e-3 litre;
  unit substance = 1e-3 mole;
end
