// SBML level 2 version 4

model Model_1()
  // New Model

  // Compartments:
  compartment cell = 1;

  // Species:
  species A in cell = 0;
  species gA in cell = 1;
  species B in cell = 0;
  species gB in cell = 1;
  species A2 in cell = 10;
  species B2 in cell = 0;
  species B2gA in cell = 0;
  species A2gB in cell = 0;
  species B2gB in cell = 1;
  species A2gA in cell = 1;

  // Parameters:
  geA = 0.1;
  repA = 1;
  rep_r = 0.01;
  dim = 1;
  dim_r = 0.01;
  deg = 0.5;
  aut_1 = 1;
  aut_2 = 0.01;
  aut_3 = 1;
  deg_dim = 0;
  geB = 0;
  repB = 0;

  // Reactions:
  R1: gA => gA + A; cell*geA*gA;
  R2: gB => gB + B; cell*geB*gB;
  R3: 2 A => A2; cell*dim*A^2;
  R4: 2 B => B2; cell*dim*B^2;
  R5: B2 => 2 B; cell*dim_r*B2;
  R6: A2 => 2 A; cell*dim_r*A2;
  R7: gA + B2 => B2gA; cell*repA*gA*B2;
  R8: B2gA => gA + B2; cell*rep_r*B2gA;
  R9: gB + A2 => A2gB; cell*repB*gB*A2;
  R10: A2gB => gB + A2; cell*rep_r*A2gB;
  R11: A => ; cell*deg*A;
  R12: B => ; cell*deg*B;
  R13: B2 + gB => B2gB; cell*aut_1*B2*gB;
  R14: B2gB => B + B2gB; cell*aut_2*B2gB;
  R15: B2gB => B2 + gB; cell*aut_3*B2gB;
  R16: A2 + gA => A2gA; cell*aut_1*A2*gA;
  R17: A2gA => A + A2gA; cell*aut_2*A2gA;
  R18: A2gA => A2 + gA; cell*aut_3*A2gA;
  R25: A2 => ; cell*deg_dim*A2;
  R26: B2 => ; cell*deg_dim*B2;

  // Unit definitions:
  unit volume = 1e-3 litre;
  unit substance = 1e-3 mole;
end
