// SBML level 2 version 4

model Model_1()
  // New Model

  // Compartments:
  compartment cell = 1;

  // Species:
  species A in cell = 0;
  species gA in cell = 1;
  species B in cell = 0;
  species gB in cell = 1;
  species A2 in cell = 0;
  species B2 in cell = 0;
  species A2gB in cell = 0;
  species B2gA in cell = 0;
  species S in cell = 0;
  species SA2 in cell = 0;
  species R in cell = 0;
  species RB2 in cell = 0;

  // Parameters:
  ge = 0.1;
  rep = 1;
  rep_r = 0.01;
  dim = 1;
  dim_r = 0.01;
  deg = 0.5;
  rep_dim = 10;
  rep_dim_r = 0.01;
  deg_sr = 0.5;
  deg_dim = 0;

  // Reactions:
  R1: gA => gA + A; cell*ge*gA;
  R2: gB => gB + B; cell*ge*gB;
  R3: 2 A => A2; cell*dim*A^2;
  R4: 2 B => B2; cell*dim*B^2;
  R5: B2 => 2 B; cell*dim_r*B2;
  R6: A2 => 2 A; cell*dim_r*A2;
  R7: gA + B2 => B2gA; cell*rep*gA*B2;
  R8: B2gA => gA + B2; cell*rep_r*B2gA;
  R9: gB + A2 => A2gB; cell*rep*gB*A2;
  R10: A2gB => gB + A2; cell*rep_r*A2gB;
  R11: A => ; cell*deg*A;
  R12: B => ; cell*deg*B;
  R13: S + A2 => SA2; cell*rep_dim*S*A2;
  R14: SA2 => S + A2; cell*rep_dim_r*SA2;
  R15: R + B2 => RB2; cell*rep_dim*R*B2;
  R16: RB2 => R + B2; cell*rep_dim_r*RB2;
  R17: R => ; cell*deg_sr*R;
  R18: S => ; cell*deg_sr*S;
  R19: A2 => ; cell*deg_dim*A2;
  R20: B2 => ; cell*deg_dim*B2;

  // Events:
  Stim: at (time == 20): S = 100;
  Rep: at (time == 70): R = 100;

  // Unit definitions:
  unit volume = 1e-3 litre;
  unit substance = 1e-3 mole;
end
